// SBML level 2 version 1
// Created by MetaCrop v1.0, Copyright 2005-2007 IPK Gatersleben

function function_14(Vf, substratea, Kma)
  Vf*substratea/(Kma + substratea);
end

model model_31()
  // Sugar metabolism

  // Compartments:
  compartment default;
  compartment unknown;

  // Species:
  species spec12loc1 in unknown = 0; spec12loc1 is "sucrose";
  species spec14loc1 in unknown = 0; spec14loc1 is "P";
  species spec16loc1 in unknown = 0; spec16loc1 is "glucose";
  species spec18loc1 in unknown = 0; spec18loc1 is "glucose 6-phosphate";
  species spec19loc1 in unknown = 0; spec19loc1 is "phosphate";
  species spec21loc1 in unknown = 0; spec21loc1 is "UDP-glucose";
  species spec23loc1 in unknown = 0; spec23loc1 is "UDP";
  species spec24loc1 in unknown = 0; spec24loc1 is "fructose";
  species spec30loc1 in unknown = 0; spec30loc1 is "NAD+";
  species spec31loc1 in unknown = 0; spec31loc1 is "NADH";
  species spec51loc1 in unknown = 0; spec51loc1 is "NADP+";
  species spec52loc1 in unknown = 0; spec52loc1 is "NADPH";
  species spec396loc1 in unknown = 0; spec396loc1 is "myo-inositol 1-phosphate";
  species spec397loc1 in unknown = 0; spec397loc1 is "myo-inositol";
  species spec428loc1 in unknown = 0; spec428loc1 is "trehalose 6-phosphate";
  species spec430loc1 in unknown = 0; spec430loc1 is "trehalose";
  species spec432loc1 in unknown = 0; spec432loc1 is "UDP-rhamnose";
  species spec434loc1 in unknown = 0; spec434loc1 is "UDP-4-dehydro-6-deoxy-glucose";
  species spec452loc1 in unknown = 0; spec452loc1 is "alpha-D-galactose";
  species spec473loc1 in unknown = 0; spec473loc1 is "UDP-galactose";
  species spec581loc1 in unknown = 0; spec581loc1 is "galactinol";
  species spec583loc1 in unknown = 0; spec583loc1 is "raffinose";
  species spec585loc1 in unknown = 0; spec585loc1 is "stachyose";
  species spec586loc1 in unknown = 0; spec586loc1 is "melibiose";

  // Reactions:
  reaction_7_1: spec12loc1 => spec16loc1 + spec24loc1; unknown*function_14(Vf, Kma, spec12loc1); reaction_7_1 is "invertase";
    Vf = 0.1197333; Kma = 11.75;
  reaction_208_1: spec18loc1 => spec396loc1; ; reaction_208_1 is "myo-inositol-1-phosphate synthase";
  reaction_209_1: spec396loc1 => spec19loc1 + spec397loc1; ; reaction_209_1 is "inositol-1(or 4)-monophosphatase";
  reaction_226_1: spec18loc1 + spec21loc1 => spec23loc1 + spec428loc1; ; reaction_226_1 is "alpha,alpha-trehalose-phosphate synthase (UDP-forming)";
  reaction_228_1: spec428loc1 => spec14loc1 + spec430loc1; ; reaction_228_1 is "trehalose-phosphatase";
  reaction_229_1: spec21loc1 + spec31loc1 -> spec30loc1 + spec432loc1; ; reaction_229_1 is "UDP-L-rhamnose synthase";
  reaction_230_1: spec21loc1 -> spec434loc1; ; reaction_230_1 is "UDP-glucose 4,6-dehydratase";
  reaction_231_1: spec52loc1 + spec434loc1 -> spec51loc1 + spec432loc1; ; reaction_231_1 is "nucleotide rhamnose synthase";
  reaction_250_1: spec21loc1 -> spec473loc1; ; reaction_250_1 is "UDP-glucose 4-epimerase";
  reaction_305_1: spec397loc1 + spec473loc1 -> spec23loc1 + spec581loc1; ; reaction_305_1 is "inositol 1-alpha-galactosyltransferase";
  reaction_306_1: spec12loc1 + spec581loc1 -> spec397loc1 + spec583loc1; ; reaction_306_1 is "galactinol-sucrose galactosyltransferase";
  reaction_307_1: spec581loc1 + spec583loc1 => spec397loc1 + spec585loc1; ; reaction_307_1 is "galactinol-raffinose galactosyltransferase";
  reaction_309_1: spec586loc1 => spec16loc1 + spec452loc1; ; reaction_309_1 is "alpha-galactosidase";

  // Unit definitions:
  unit volume = 1e-3 litre;
  unit substance = 1e-3 mole;
end
