// SBML level 2 version 1
// Created by MetaCrop v1.0, Copyright 2005-2007 IPK Gatersleben

function function_13(vmax, Ff6P, ATP, kmFf6P, kmATP, ADP, kiADP)
  vmax*(Ff6P*ATP/(kmFf6P*kmATP))/((1 + ADP/kiADP)*(1 + ATP/kmATP)*(1 + Ff6P/kmFf6P));
end

function function_4(Vf, substratea, productp, Keq, Kma, Kmp)
  Vf*(substratea - productp/Keq)/(substratea + Kma*(1 + productp/Kmp));
end

model model_34()
  // Glycolysis, Gluconeogenesis

  // Compartments:
  compartment plastid;
  compartment cytosol;
  compartment mitochondrion;

  // Species:
  species spec11loc1 in plastid = 0; spec11loc1 is "ATP";
  species spec11loc2 in cytosol = 0; spec11loc2 is "ATP";
  species spec13loc1 in plastid = 0; spec13loc1 is "ADP";
  species spec13loc2 in cytosol = 0; spec13loc2 is "ADP";
  species spec14loc1 in plastid = 0; spec14loc1 is "P";
  species spec14loc2 in cytosol = 0; spec14loc2 is "P";
  species spec15loc1 in plastid = 0; spec15loc1 is "fructose 6-phosphate";
  species spec15loc2 in cytosol = 0; spec15loc2 is "fructose 6-phosphate";
  species spec17loc1 in plastid = 0; spec17loc1 is "glucose 1-phosphate";
  species spec17loc2 in cytosol = 0; spec17loc2 is "glucose 1-phosphate";
  species spec18loc1 in plastid = 0; spec18loc1 is "glucose 6-phosphate";
  species spec18loc2 in cytosol = 0; spec18loc2 is "glucose 6-phosphate";
  species spec20loc1 in plastid = 0; spec20loc1 is "PP";
  species spec20loc2 in cytosol = 0; spec20loc2 is "PP";
  species spec26loc1 in plastid = 0; spec26loc1 is "fructose 1,6-bisphosphate";
  species spec26loc2 in cytosol = 0; spec26loc2 is "fructose 1,6-bisphosphate";
  species spec28loc1 in plastid = 0; spec28loc1 is "dihydroxyacetone phosphate";
  species spec28loc2 in cytosol = 0; spec28loc2 is "dihydroxyacetone phosphate";
  species spec29loc1 in plastid = 0; spec29loc1 is "glyceraldehyde 3-phosphate";
  species spec29loc2 in cytosol = 0; spec29loc2 is "glyceraldehyde 3-phosphate";
  species spec30loc2 in cytosol = 0; spec30loc2 is "NAD+";
  species spec30loc3 in mitochondrion = 0; spec30loc3 is "NAD+";
  species spec31loc2 in cytosol = 0; spec31loc2 is "NADH";
  species spec31loc3 in mitochondrion = 0; spec31loc3 is "NADH";
  species spec33loc1 in plastid = 0; spec33loc1 is "1,3 - Bisphospho - glycerate";
  species spec33loc2 in cytosol = 0; spec33loc2 is "1,3 - Bisphospho - glycerate";
  species spec34loc1 in plastid = 0; spec34loc1 is "2-Phospho-glycerate";
  species spec34loc2 in cytosol = 0; spec34loc2 is "2-Phospho-glycerate";
  species spec35loc1 in plastid = 0; spec35loc1 is "3-phospho-glycerate";
  species spec35loc2 in cytosol = 0; spec35loc2 is "3-phospho-glycerate";
  species spec36loc1 in plastid = 0; spec36loc1 is "phosphoenolpyruvate";
  species spec36loc2 in cytosol = 0; spec36loc2 is "phosphoenolpyruvate";
  species spec37loc1 in plastid = 0; spec37loc1 is "pyruvate";
  species spec37loc2 in cytosol = 0; spec37loc2 is "pyruvate";
  species spec37loc3 in mitochondrion = 0; spec37loc3 is "pyruvate";
  species spec51loc1 in plastid = 0; spec51loc1 is "NADP+";
  species spec52loc1 in plastid = 0; spec52loc1 is "NADPH";
  species spec51loc2 in cytosol = 0; spec51loc2 is "NADP+";
  species spec52loc2 in cytosol = 0; spec52loc2 is "NADPH";
  species spec94loc2 in cytosol = 0; spec94loc2 is "oxaloacetate";
  species spec94loc3 in mitochondrion = 0; spec94loc3 is "oxaloacetate";
  species spec103loc1 in plastid = 0; spec103loc1 is "malate";
  species spec103loc2 in cytosol = 0; spec103loc2 is "malate";
  species spec103loc3 in mitochondrion = 0; spec103loc3 is "malate";
  species spec106loc1 in plastid = 0; spec106loc1 is "CO2";
  species spec106loc2 in cytosol = 0; spec106loc2 is "CO2";
  species spec106loc3 in mitochondrion = 0; spec106loc3 is "CO2";
  species spec167loc1 in plastid = 0; spec167loc1 is "L-glutamate";
  species spec167loc2 in cytosol = 0; spec167loc2 is "L-glutamate";
  species spec241loc1 in plastid = 0; spec241loc1 is "AMP";
  species spec241loc2 in cytosol = 0; spec241loc2 is "AMP";

  // Reactions:
  reaction_22_1: spec14loc1 + spec29loc1 + spec51loc1 -> spec33loc1 + spec52loc1; ; reaction_22_1 is "glyceraldehyde-3-phosphate dehydrogenase (NADP+) (phosphorylating)";
  reaction_23_2: spec14loc2 + spec29loc2 + spec30loc2 -> spec31loc2 + spec33loc2; ; reaction_23_2 is "glyceraldehyde-3-phosphate dehydrogenase (phosphorylating)";
  reaction_24_2: spec29loc2 + spec51loc2 => spec35loc2 + spec52loc2; ; reaction_24_2 is "glyceraldehyde-3-phosphate dehydrogenase (NADP)";
  reaction_31_1: spec15loc1 + spec20loc1 -> spec14loc1 + spec26loc1; ; reaction_31_1 is "diphosphate-fructose-6-phosphate 1-phosphotransferase";
  reaction_34_1: spec14loc1 + spec36loc2 -> spec14loc2 + spec36loc1; ; reaction_34_1 is "phosphoenolpyruvat/phosphat transporter";
  reaction_35_1: spec17loc1 -> spec18loc1; plastid*function_4(reaction_35_1_Vf, reaction_35_1_Keq, reaction_35_1_Kma, reaction_35_1_Kmp, spec17loc1, spec18loc1); reaction_35_1 is "phosphoglucomutase (pPGM)";
    reaction_35_1_Vf = 1.43; reaction_35_1_Kma = 0.059; reaction_35_1_Keq = 1; reaction_35_1_Kmp = 1;
  reaction_40_2: spec11loc2 + spec15loc2 => spec13loc2 + spec26loc2; ; reaction_40_2 is "6-phosphofructokinase (cPFK)";
  reaction_41_1: spec11loc1 + spec15loc1 => spec13loc1 + spec26loc1; ; reaction_41_1 is "6-phosphofructokinase (pPFK)";
  reaction_43_1: spec26loc1 -> spec28loc1 + spec29loc1; ; reaction_43_1 is "fructose-bisphosphate aldolase (pALD)";
  reaction_44_2: spec17loc2 -> spec18loc2; cytosol*function_4(reaction_44_2_Vf, reaction_44_2_Keq, reaction_44_2_Kma, reaction_44_2_Kmp, spec17loc2, spec18loc2); reaction_44_2 is "phosphoglucomutase (cPGM)";
    reaction_44_2_Vf = 1.747; reaction_44_2_Kma = 0.1; reaction_44_2_Keq = 1; reaction_44_2_Kmp = 1;
  reaction_45_2: spec15loc2 -> spec18loc2; cytosol*function_4(reaction_45_2_Vf, reaction_45_2_Keq, reaction_45_2_Kma, reaction_45_2_Kmp, spec15loc2, spec18loc2); reaction_45_2 is "phosphoglucose isomerase (cPGI)";
    reaction_45_2_Vf = 1.116; reaction_45_2_Kma = 0.175; reaction_45_2_Keq = 1; reaction_45_2_Kmp = 0.44;
  reaction_46_1: spec15loc1 -> spec18loc1; plastid*function_4(reaction_46_1_Vf, reaction_46_1_Keq, reaction_46_1_Kma, reaction_46_1_Kmp, spec15loc1, spec18loc1); reaction_46_1 is "phosphoglucose isomerase (pPGI)";
    reaction_46_1_Vf = 1; reaction_46_1_Kma = 0.12; reaction_46_1_Keq = 1; reaction_46_1_Kmp = 0.44;
  reaction_47_2: spec13loc2 + spec33loc2 -> spec11loc2 + spec35loc2; ; reaction_47_2 is "phosphoglycerate kinase (cPGlyK)";
  reaction_48_1: spec13loc1 + spec33loc1 -> spec11loc1 + spec35loc1; ; reaction_48_1 is "phosphoglycerate kinase (pPGlyK)";
  reaction_49_2: spec35loc2 -> spec34loc2; ; reaction_49_2 is "phosphoglycerate mutase (cPGlyM)";
  reaction_50_1: spec35loc1 -> spec34loc1; ; reaction_50_1 is "phosphoglycerate mutase (pPGlyM)";
  reaction_51_2: spec34loc2 -> spec36loc2; ; reaction_51_2 is "phosphopyruvate hydratase (cENOLASE)";
  reaction_52_1: spec34loc1 -> spec36loc1; ; reaction_52_1 is "phosphopyruvate hydratase (pENOLASE)";
  reaction_53_2: spec13loc2 + spec36loc2 => spec11loc2 + spec37loc2; ; reaction_53_2 is "pyruvate kinase (cPK)";
  reaction_54_1: spec13loc1 + spec36loc1 => spec11loc1 + spec37loc1; ; reaction_54_1 is "pyruvate kinase (pPK)";
  reaction_55_2: spec28loc2 -> spec29loc2; ; reaction_55_2 is "triose phosphate isomerase (cTIM)";
  reaction_56_1: spec28loc1 -> spec29loc1; plastid*function_4(reaction_56_1_Vf, reaction_56_1_Keq, reaction_56_1_Kma, reaction_56_1_Kmp, spec28loc1, spec29loc1); reaction_56_1 is "triose phosphate isomerase (pTIM)";
    reaction_56_1_Vf = 1; reaction_56_1_Kma = 2.5; reaction_56_1_Keq = 1; reaction_56_1_Kmp = 0.68;
  reaction_65_2: spec30loc2 + spec103loc2 -> spec31loc2 + spec94loc2; ; reaction_65_2 is "malate dehydrogenase";
  reaction_70_2: spec26loc2 -> spec28loc2 + spec29loc2; ; reaction_70_2 is "fructose-bisphosphate aldolase (cALD)";
  reaction_221_2: spec36loc2 + spec106loc2 => spec14loc2 + spec94loc2; ; reaction_221_2 is "phosphoenolpyruvate carboxylase";
  reaction_222_3: spec30loc3 + spec103loc3 => spec31loc3 + spec37loc3 + spec106loc3; ; reaction_222_3 is "malate dehydrogenase (decarboxylating)";
  reaction_337_1: spec51loc1 + spec103loc1 -> spec37loc1 + spec52loc1 + spec106loc1; ; reaction_337_1 is "malate dehydrogenase (oxaloacetate-decarboxylating) (NADP+)";
  reaction_338_2: spec11loc2 + spec94loc2 => spec13loc2 + spec36loc2 + spec106loc2; ; reaction_338_2 is "phosphoenolpyruvate carboxykinase (ATP)";
  reaction_349_1: spec14loc1 + spec17loc2 -> spec14loc2 + spec17loc1; ; reaction_349_1 is "G1P transporter";
  reaction_410_1: spec14loc1 + spec18loc2 -> spec14loc2 + spec18loc1; ; reaction_410_1 is "G6P transporter";
  reaction_414_1: spec103loc1 + spec167loc2 -> spec103loc2 + spec167loc1; ; reaction_414_1 is "malate/glutamate transporter";
  reaction_422_3: spec37loc2 -> spec37loc3; ; reaction_422_3 is "pyruvate transporter";
  reaction_424_3: spec94loc3 + spec103loc2 -> spec94loc2 + spec103loc3; ; reaction_424_3 is "OAA/malate transporter";
  reaction_440_2: spec11loc2 + spec14loc2 + spec37loc2 -> spec20loc2 + spec36loc2 + spec241loc2; ; reaction_440_2 is "pyruvate, phosphate dikinase (cPPDK)";
  reaction_441_1: spec11loc1 + spec14loc1 + spec37loc1 -> spec20loc1 + spec36loc1 + spec241loc1; ; reaction_441_1 is "pyruvate, phosphate dikinase (pPPDK)";
  reaction_465_2: spec26loc2 => spec14loc2 + spec15loc2; ; reaction_465_2 is "fructose-1,6-bisphosphatase (cFBPAse)";
  reaction_466_1: spec26loc1 => spec14loc1 + spec15loc1; ; reaction_466_1 is "fructose-1,6-bisphosphatase (pFBPase)";
  reaction_510_1: spec14loc1 + spec28loc2 -> spec14loc2 + spec28loc1; ; reaction_510_1 is "triosephosphat/P translocator (TPT2_DHAP)";
  reaction_511_1: spec14loc1 + spec29loc2 -> spec14loc2 + spec29loc1; ; reaction_511_1 is "triosephosphat/P translocator (TPT1_GAP)";
  reaction_512_1: spec14loc2 + spec35loc1 -> spec14loc1 + spec35loc2; ; reaction_512_1 is "triosephosphat/P translocator (TPT3_3-PGA)";

  // Unit definitions:
  unit volume = 1e-3 litre;
  unit substance = 1e-3 mole;
end
